M := READRGB("image.bmp")
m := rows(M)
n := cols(M)
i := 0 .. (m - 1)
j := 0 .. (n/3 - 1)
B[i, j] := M[i, j + 2*n/3]
G[i, j] := M[i, j + n/3]
R[i, j] := M[i, j]
# [component: inputs R, G, B]
Y[i, j] := 0.3*R[i, j] + 0.59*G[i, j] + 0.11*B[i, j]
th := FRAME
Y[i, j] :=
    0 if (Y[i, j] < th)
    Y[i, j] otherwise
th = 0
# [component: inputs Y]
WRITEBMP("image_2.bmp") □ Y
